**

** Heading +++++++++++++++++++++++++++++++++++++++++++++++++

**

*Heading

Hash: qb2Pg5Vx, Date: 05/14/2026, Unit system: MM_TON_S_C

**

** Nodes +++++++++++++++++++++++++++++++++++++++++++++++++++

**

*Node
1, 3.75000000E+001, 1.66994856E+001
2, 3.50000000E+001, 1.66994856E+001
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
**

** Elements ++++++++++++++++++++++++++++++++++++++++++++++++

**

*Element, Type=CAX6, Elset=Shell_part-1
1, 1, 11, 199, 605, 606, 607
2, 11, 12, 200, 608, 609, 610
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
**

** Node sets +++++++++++++++++++++++++++++++++++++++++++++++

**

*Nset, Nset=rightandleft
1, 2, 3, 4, 11, 12
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
**

** Element sets ++++++++++++++++++++++++++++++++++++++++++++

**

*Elset, Elset=Element_Set-1
1, 2, 3, 4, 5, 6
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
*Elset, Elset=Missing_section-1
1, 2, 3, 4, 5, 6
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
*Elset, Elset=Internal_Selection-1_Solid_Section-1

Shell_part-1

**

** Surfaces ++++++++++++++++++++++++++++++++++++++++++++++++

**

**

** Physical constants ++++++++++++++++++++++++++++++++++++++

**

**

** Coordinate systems ++++++++++++++++++++++++++++++++++++++

**

**

** Materials +++++++++++++++++++++++++++++++++++++++++++++++

**

*Material, Name=Material-1

*Density

7.77E-09

*Elastic

183839.162351231, 2.80995242E-001

**

** Sections ++++++++++++++++++++++++++++++++++++++++++++++++

**

*Solid section, Elset=Internal_Selection-1_Solid_Section-1, Material=Material-1

1

**

** Pre-tension sections ++++++++++++++++++++++++++++++++++++

**

**

** Constraints +++++++++++++++++++++++++++++++++++++++++++++

**

**

** Surface interactions ++++++++++++++++++++++++++++++++++++

**

**

** Contact pairs +++++++++++++++++++++++++++++++++++++++++++

**

**

** Amplitudes ++++++++++++++++++++++++++++++++++++++++++++++

**

**

** Initial conditions ++++++++++++++++++++++++++++++++++++++

**

**

** Steps +++++++++++++++++++++++++++++++++++++++++++++++++++

**

**

** Step-1 ++++++++++++++++++++++++++++++++++++++++++++++++++

**

*Step

*Static, Solver=Pardiso

**

** Controls ++++++++++++++++++++++++++++++++++++++++++++++++

**

**

** Output frequency ++++++++++++++++++++++++++++++++++++++++

**

*Output, Frequency=1

**

** Boundary conditions +++++++++++++++++++++++++++++++++++++

**

*Boundary, op=New

** Name: Displacement_Rotation-1

*Boundary

rightandleft, 1, 1, 0

rightandleft, 2, 2, 0

**

** Loads +++++++++++++++++++++++++++++++++++++++++++++++++++

**

*Cload, op=New

*Dload, op=New

** Name: Centrifugal_Load-1

*Dload

Element_Set-1, CENTRIF, 1096606.8961, 0, 0, 0, 0, 1, 0

**

** Defined fields ++++++++++++++++++++++++++++++++++++++++++

**

**

** History outputs +++++++++++++++++++++++++++++++++++++++++

**

**

** Field outputs +++++++++++++++++++++++++++++++++++++++++++

**

*Node file

RF, U

*El file

S, E, NOE

**

** End step ++++++++++++++++++++++++++++++++++++++++++++++++

**

*End step

**

** Step-2 ++++++++++++++++++++++++++++++++++++++++++++++++++

**

*Step, Perturbation

*Frequency, Solver=Pardiso

10

**

** Controls ++++++++++++++++++++++++++++++++++++++++++++++++

**

**

** Output frequency ++++++++++++++++++++++++++++++++++++++++

**

*Output, Frequency=1

**

** Boundary conditions +++++++++++++++++++++++++++++++++++++

**

*Boundary, op=New

** Name: Displacement_Rotation-2

*Boundary

rightandleft, 1, 1, 0

rightandleft, 2, 2, 0

**

** Loads +++++++++++++++++++++++++++++++++++++++++++++++++++

**

**

** Defined fields ++++++++++++++++++++++++++++++++++++++++++

**

**

** History outputs +++++++++++++++++++++++++++++++++++++++++

**

**

** Field outputs +++++++++++++++++++++++++++++++++++++++++++

**

*Node file

RF, U

*El file

S, E, NOE

*Node file

RF, U

*El file

S, E, NOE

**

** End step ++++++++++++++++++++++++++++++++++++++++++++++++

**

*End step
